// COMSOL Multiphysics 5.2.1.152 model "model.mph"
// Outline of the model tree

Geometry
  geom1 "Geometry 1" (2D axisymmetric, length unit m)
    imp1: Import | filename = D:\fastFEM\matlab\轴对称线圈铁芯非线性\MODEL.DXF
    fin: Finalize "Form Union"

Materials
  mat1: Common "Air" on domains 1, 2, 5
    def "Basic"
      relpermeability = 1
      relpermittivity = 1
      dynamicviscosity = eta(T[1/K])[Pa*s]
      ratioofspecificheat = 1.4
      electricconductivity = 0[S/m]
      heatcapacity = Cp(T[1/K])[J/(kg*K)]
      density = rho(pA[1/Pa],T[1/K])[kg/m^3]
      thermalconductivity = k(T[1/K])[W/(m*K)]
      soundspeed = cs(T[1/K])[m/s]
      eta: Piecewise | arg = T; extrap = constant; pieces = {200.0, 1600.0, -8.38278E-7+8.35717342E-8*T^1-7.69429583E-11*T^2+4.6437266E-14*T^3-1.06585607E-17*T^4}
      Cp: Piecewise | arg = T; extrap = constant; pieces = {200.0, 1600.0, 1047.63657-0.372589265*T^1+9.45304214E-4*T^2-6.02409443E-7*T^3+1.2858961E-10*T^4}
      rho: Analytic | expr = pA*0.02897/8.314/T; args = {pA, T}; dermethod = manual; argders = {{pA, d(pA*0.02897/8.314/T,pA)}, {T, d(pA*0.02897/8.314/T,T)}}
      k: Piecewise | arg = T; extrap = constant; pieces = {200.0, 1600.0, -0.00227583562+1.15480022E-4*T^1-7.90252856E-8*T^2+4.11702505E-11*T^3-7.43864331E-15*T^4}
      cs: Analytic | expr = sqrt(1.4*287*T); args = T; dermethod = manual; argders = {T, d(sqrt(1.4*287*T),T)}
    RefractiveIndex
      n = 1
      ki = 0
  mat2: Common "Soft Iron (without losses)" on domains 3, 4
    def "Basic"
      electricconductivity = 0[S/m]
      relpermittivity = 1
    BHCurve
      normB = BH(normH[m/A])[T]
      normH = sqrt(H1^2+H2^2+H3^2)
      BH: Interpolation
        source = table
        table = {{0, 0}, {663.146, 1}, {1067.5, 1.1}, {1705.23, 1.2}, {2463.11, 1.3}, {3841.67, 1.4}, {5425.74, 1.5}, {7957.75, 1.6}, {12298.3, 1.7}, {20462.8, 1.8}, {32169.6, 1.9}, {61213.4, 2.0}, {111408, 2.1}, {175070, 2.2}, {261469, 2.3}, {318310, 2.4}}
        interp = linear
        extrap = linear
    HBCurve
      normH = HB(normB[1/T])[A/m]
      normB = sqrt(B1^2+B2^2+B3^2)
      HB: Interpolation
        source = table
        table = {{0, 0}, {1, 663.146}, {1.1, 1067.5}, {1.2, 1705.23}, {1.3, 2463.11}, {1.4, 3841.67}, {1.5, 5425.74}, {1.6, 7957.75}, {1.7, 12298.3}, {1.8, 20462.8}, {1.9, 32169.6}, {2.0, 61213.4}, {2.1, 111408}, {2.2, 175070}, {2.3, 261469}, {2.4, 318310}}
        interp = linear
        extrap = linear
    EffectiveBHCurve
      normBeff = BHeff(normHeff[m/A])[T]
      normHeff = sqrt(realdot(H1,H1)+realdot(H2,H2)+realdot(H3,H3))
      BHeff: Interpolation
        source = table
        table = 
          {0, 0}
          {663.146, 1}
          {1067.5, 1.49439064869}
          {1705.23, 1.94163007382}
          {2463.11, 2.25761949405}
          {3841.67, 2.72975505967}
          {5425.74, 2.87566514896}
          {7957.75, 3.14902923402}
          {12298.3, 3.45293721268}
          {20462.8, 3.7845615956}
          {32169.6, 4.06019591028}
          {61213.4, 4.42177726607}
          {111408, 4.72195400511}
          {175070, 4.94119864969}
          {261469, 5.14465994384}
          {318310, 5.25334603964}
        interp = linear
        extrap = linear
    EffectiveHBCurve
      normHeff = HBeff(normBeff[1/T])[A/m]
      normBeff = sqrt(realdot(B1,B1)+realdot(B2,B2)+realdot(B3,B3))
      HBeff: Interpolation
        source = table
        table = 
          {0, 0}
          {1, 663.146}
          {1.49439064869, 1067.5}
          {1.94163007382, 1705.23}
          {2.25761949405, 2463.11}
          {2.72975505967, 3841.67}
          {2.87566514896, 5425.74}
          {3.14902923402, 7957.75}
          {3.45293721268, 12298.3}
          {3.7845615956, 20462.8}
          {4.06019591028, 32169.6}
          {4.42177726607, 61213.4}
          {4.72195400511, 111408}
          {4.94119864969, 175070}
          {5.14465994384, 261469}
          {5.25334603964, 318310}
        interp = linear
        extrap = linear

Physics
  mf: InductionCurrents "Magnetic Fields" on all domains
    dependent variable A = {Ar, Aphi, Az}
    al1: AmperesLaw "Ampère's Law 1" (default)
    axi1: AxialSymmetry (default)
    mi1: MagneticInsulation (default)
    init1: init "Initial Values 1" (default)
    al2: AmperesLaw "Ampère's Law 2" on domains 1, 2
    al3: AmperesLaw "Ampère's Law 3" on domains 3, 4 | ConstitutiveRelationH = HBCurve
    ecd1: ExternalCurrentDensity on domains 5 | Je = {0, 8e5, 0}

Mesh
  mesh1 "Mesh 1"
    size: MeshSizeDefault | hmax = 0.0067; hmin = 3.0E-5; hcurve = 0.3; hnarrow = 1; hgrad = 1.3; hauto = 5
    ftri1: FreeTri "Free Triangular 1" on domains 1
    ftri2: FreeTri "Free Triangular 2" on remaining entities
      size1: Size on entire geometry | hmax = 0.0006; hmin = 1.0E-5; hauto = 5; custom = on

Studies
  std1 "Study 1"
    stat: Stationary

Solver configurations
  sol1 "Solution 1" (study std1)
    v1: Variables "Dependent Variables 1"
    s1: Stationary "Stationary Solver 1"
      dDef: Direct
      fc1: FullyCoupled | linsolver = dDef

Datasets
  dset1: Solution | solution = sol1
  rev1: Revolve2D "Revolution 2D 1" | data = dset1; genpoints = {{0, 0}, {0, 1}}; startangle = -90; revangle = 225

Plots
  pg1: PlotGroup2D "Magnetic Flux Density Norm (mf)" | data = dset1
    surf1: Surface | expr = mf.normB
  pg2: PlotGroup3D "Magnetic Flux Density Norm, Revolved Geometry (mf)" | data = rev1
    surf1: Surface | expr = mf.normB
  pg3: PlotGroup2D "2D Plot Group 3" | data = dset1
    surf1: Surface | expr = comp1.Aphi
    con1: Contour | expr = comp1.Aphi; contourtype = filled

Exports
  data1: Data | data = dset1; expr = comp1.Aphi; filename = D:\fastFEM\matlab\轴对称线圈铁芯非线性\comsoldata.txt